# OpenSim document version 40000
COMAKInverseKinematicsTool:
  model_file: ../../../../myModels/lenhart_kul_right_unlocked-scaled.osim
  results_directory: ../results/comak-inverse-kinematics
  results_prefix: walking
  perform_secondary_constraint_sim: true
  secondary_coordinates: /jointset/knee_r/knee_add_r /jointset/knee_r/knee_rot_r /jointset/knee_r/knee_tx_r /jointset/knee_r/knee_ty_r /jointset/knee_r/knee_tz_r /jointset/pf_r/pf_flex_r /jointset/pf_r/pf_rot_r /jointset/pf_r/pf_tilt_r /jointset/pf_r/pf_tx_r /jointset/pf_r/pf_ty_r /jointset/pf_r/pf_tz_r
  secondary_coupled_coordinate: /jointset/knee_r/knee_flex_r
  secondary_constraint_sim_settle_time: 1
  secondary_constraint_sim_sweep_time: 3
  secondary_coupled_coordinate_start_value: 0 [meters]
  secondary_coupled_coordinate_stop_value: 120 [meters]
  secondary_constraint_sim_integrator_accuracy: 1e-6
  secondary_constraint_function_file: ../results/comak-inverse-kinematics/my-secondary_coordinate_constraint_functions.xml
  print_secondary_constraint_sim_results: false
  perform_inverse_kinematics: true
  use_visualizer: false
  verbose: 0
  InverseKinematicsTool:
    results_directory: ../results/comak-inverse-kinematics
    model_file: unassigned
    constraint_weight: Inf
    accuracy: 1e-5
    marker_file: ../../../../../../data/AK-data/2018-08-21-trc-mot/Dynamic11_marker.trc
    time_range: 1.9 2.9
    report_errors: true
    output_motion_file: ../results/comak-inverse-kinematics/Dynamic11_marker_ik.mot
    report_marker_locations: true
    IKTaskSet:
      IKMarkerTask HeadL: apply=true weight=1
      IKMarkerTask HeadR: apply=true weight=1
      IKMarkerTask HeadFront: apply=true weight=1
      IKMarkerTask Chest: apply=true weight=1
      IKMarkerTask SpineThoracic2: apply=true weight=1
      IKMarkerTask SpineThoracic12: apply=false weight=1
      IKMarkerTask LShoulderTop: apply=true weight=1
      IKMarkerTask RShoulderTop: apply=true weight=1
      IKMarkerTask WaistLFront: apply=true weight=1
      IKMarkerTask WaistL: apply=true weight=1
      IKMarkerTask WaistBack: apply=true weight=1
      IKMarkerTask WaistR: apply=true weight=1
      IKMarkerTask WaistRFront: apply=true weight=1
      IKMarkerTask LTroch: apply=false weight=1
      IKMarkerTask LThighFrontLow: apply=true weight=1
      IKMarkerTask LKneeOut: apply=true weight=1
      IKMarkerTask LKneeIn: apply=true weight=1
      IKMarkerTask LShinFrontHigh: apply=true weight=1
      IKMarkerTask LAnkleOut: apply=true weight=1
      IKMarkerTask LHeelBack: apply=true weight=1
      IKMarkerTask LAnkleIn: apply=false weight=1
      IKMarkerTask LForefoot5: apply=true weight=1
      IKMarkerTask LForefoot2: apply=true weight=1
      IKMarkerTask LHJC: apply=false weight=1
      IKMarkerTask LKJC: apply=false weight=1
      IKMarkerTask LAJC: apply=false weight=1
      IKMarkerTask RTroch: apply=false weight=1
      IKMarkerTask RThighFrontLow: apply=true weight=1
      IKMarkerTask RKneeOut: apply=true weight=1
      IKMarkerTask RKneeIn: apply=true weight=1
      IKMarkerTask RShinFrontHigh: apply=true weight=1
      IKMarkerTask RAnkleOut: apply=true weight=1
      IKMarkerTask RHeelBack: apply=true weight=1
      IKMarkerTask RAnkleIn: apply=false weight=1
      IKMarkerTask RForefoot5: apply=true weight=1
      IKMarkerTask RForefoot2: apply=true weight=1
      IKMarkerTask RHJC: apply=false weight=1
      IKMarkerTask RKJC: apply=false weight=1
      IKMarkerTask RAJC: apply=false weight=1
