# OpenSim document version 40000
AnalyzeTool Analyses:
  replace_force_set: false
  output_precision: 8
  solve_for_equilibrium_for_auxiliary_states: false
  maximum_number_of_integrator_steps: 20000
  maximum_integrator_step_size: 1
  minimum_integrator_step_size: 1e-8
  integrator_error_tolerance: 1e-5
  lowpass_cutoff_frequency_for_coordinates: 6
  AnalysisSet Analyses:
    JointReaction: step_interval=1 in_degrees=true joint_names=ALL apply_on_bodies=parent express_in_frame=parent
    Kinematics: step_interval=1 in_degrees=true
    BodyKinematics: step_interval=1 in_degrees=true bodies=all express_results_in_body_local_frame=false
    ForceReporter: step_interval=1 in_degrees=true include_constraint_forces=false
    MuscleAnalysis: start_time=0.2085 end_time=0.457 step_interval=1 in_degrees=true muscle_list=all
        moment_arm_coordinate_list=all compute_moments=false
  ControllerSet Controllers:
    ControlSetController
