# OpenSim document version 40000
ForceSet lenhart2015-l:
  defaults: CoordinateActuator default: optimal_force=1
  CoordinateActuator pelvis_tilt_reserve: coordinate=pelvis_tilt optimal_force=1
  CoordinateActuator pelvis_list_reserve: coordinate=pelvis_list optimal_force=1
  CoordinateActuator pelvis_rot_reserve: coordinate=pelvis_rot optimal_force=1
  CoordinateActuator pelvis_tx_reserve: coordinate=pelvis_tx optimal_force=1
  CoordinateActuator pelvis_ty_reserve: coordinate=pelvis_ty optimal_force=1
  CoordinateActuator pelvis_tz_reserve: coordinate=pelvis_tz optimal_force=1
  CoordinateActuator hip_flex_r_reserve: coordinate=hip_flex_r optimal_force=1
  CoordinateActuator hip_add_r_reserve: coordinate=hip_add_r optimal_force=1
  CoordinateActuator hip_rot_r_reserve: coordinate=hip_rot_r optimal_force=1
  CoordinateActuator pf_flex_l_reserve: coordinate=pf_flex_l optimal_force=1
  CoordinateActuator pf_rot_l_reserve: coordinate=pf_rot_l optimal_force=1
  CoordinateActuator pf_tilt_l_reserve: coordinate=pf_tilt_l optimal_force=1
  CoordinateActuator pf_tx_l_reserve: coordinate=pf_tx_l optimal_force=1
  CoordinateActuator pf_ty_l_reserve: coordinate=pf_ty_l optimal_force=1
  CoordinateActuator pf_tz_l_reserve: coordinate=pf_tz_l optimal_force=1
  CoordinateActuator knee_flex_l_reserve: coordinate=knee_flex_l optimal_force=1
  CoordinateActuator knee_add_l_reserve: coordinate=knee_add_l optimal_force=1
  CoordinateActuator knee_rot_l_reserve: coordinate=knee_rot_l optimal_force=1
  CoordinateActuator knee_tx_l_reserve: coordinate=knee_tx_l optimal_force=1
  CoordinateActuator knee_ty_l_reserve: coordinate=knee_ty_l optimal_force=1
  CoordinateActuator knee_tz_l_reserve: coordinate=knee_tz_l optimal_force=1
  CoordinateActuator ankle_flex_r_reserve: coordinate=ankle_flex_r optimal_force=1
  CoordinateActuator subt_angle_r_reserve: coordinate=subt_angle_r optimal_force=1
  CoordinateActuator mtp_angle_r_reserve: coordinate=mtp_angle_r optimal_force=1
  CoordinateActuator hip_flex_l_reserve: coordinate=hip_flex_l optimal_force=1
  CoordinateActuator hip_add_l_reserve: coordinate=hip_add_l optimal_force=1
  CoordinateActuator hip_rot_l_reserve: coordinate=hip_rot_l optimal_force=1
  CoordinateActuator knee_flex_r_reserve: coordinate=knee_flex_r optimal_force=1
  CoordinateActuator ankle_flex_l_reserve: coordinate=ankle_flex_l optimal_force=1
  CoordinateActuator subt_angle_l_reserve: coordinate=subt_angle_l optimal_force=1
  CoordinateActuator mtp_angle_l_reserve: coordinate=mtp_angle_l optimal_force=1
  CoordinateActuator lumbar_ext_reserve: coordinate=lumbar_ext optimal_force=1
  CoordinateActuator lumbar_latbend_reserve: coordinate=lumbar_latbend optimal_force=1
  CoordinateActuator lumbar_rot_reserve: coordinate=lumbar_rot optimal_force=1
  CoordinateActuator neck_ext_reserve: coordinate=neck_ext optimal_force=1
  CoordinateActuator neck_latbend_reserve: coordinate=neck_latbend optimal_force=1
  CoordinateActuator neck_rot_reserve: coordinate=neck_rot optimal_force=1
