# OpenSim document version 40000
MarkerSet:
  Marker HeadL: torso (0.009 0.53 -0.075)
  Marker HeadR: torso (0.009 0.53 0.075)
  Marker HeadFront: torso (0.073 0.561 0) fixed=true
  Marker Chest: torso (0.0512888 0.3236285 0.00046003) fixed=true
  Marker SpineThoracic2: torso (-0.08 0.364 0.002) fixed=true
  Marker SpineThoracic12: torso (-0.09 0.117 0) fixed=true
  Marker LShoulderTop: torso (-0.032 0.383 -0.145) fixed=true
  Marker RShoulderTop: torso (-0.032 0.383 0.145) fixed=true
  Marker WaistLFront: pelvis (0.0172 0.0093 -0.144) fixed=true
  Marker WaistL: pelvis (-0.041 0.065 -0.157) fixed=true
  Marker WaistBack: pelvis (-0.171 0.064 0) fixed=true
  Marker WaistR: pelvis (-0.041 0.065 0.157) fixed=true
  Marker WaistRFront: pelvis (0.0172 0.0093 0.144) fixed=true
  Marker LTroch: femur_l (-0.0194 -0.017 -0.076)
  Marker LThighFrontLow: femur_l (0.068 -0.34 -0.005)
  Marker LKneeOut: femur_l (0.013 -0.374 -0.05)
  Marker LKneeIn: femur_l (0.013 -0.374 0.05)
  Marker LShinFrontHigh: tibia_l (0.04 -0.069 -0.007)
  Marker LAnkleOut: tibia_l (-0.016 -0.378 -0.049) fixed=true
  Marker LHeelBack: calcn_l (-0.023 0.026 0.006) fixed=true
  Marker LAnkleIn: tibia_l (0.006 -0.378 0.039) fixed=true
  Marker LForefoot5: calcn_l (0.14 0.013 -0.062) fixed=true
  Marker LForefoot2: calcn_l (0.19 0.021 0)
  Marker LHJC: femur_l (0 0 0) fixed=true
  Marker LKJC: femur_l (0.013 -0.374 0) fixed=true
  Marker LAJC: talus_l (0 0 0) fixed=true
  Marker RTroch: femur_r (-0.0194 -0.017 0.076)
  Marker RThighFrontLow: femur_r (0.068 -0.34 0.005)
  Marker RKneeOut: femur_r (0.013 -0.374 0.05) fixed=true
  Marker RKneeIn: femur_r (0.013 -0.374 -0.05) fixed=true
  Marker RShinFrontHigh: tibia_r (0.04 -0.069 0.007)
  Marker RAnkleOut: tibia_r (-0.016 -0.378 0.049) fixed=true
  Marker RHeelBack: calcn_r (-0.023 0.026 -0.006) fixed=true
  Marker RAnkleIn: tibia_r (0.006 -0.378 -0.039) fixed=true
  Marker RForefoot5: calcn_r (0.14 0.013 0.062) fixed=true
  Marker RForefoot2: calcn_r (0.19 0.021 0) fixed=true
  Marker RHJC: femur_r (0 0 0) fixed=true
  Marker RKJC: femur_r (0.013 -0.374 0) fixed=true
  Marker RAJC: talus_r (0 0 0) fixed=true
