# OpenSim document version 40000
ScaleTool A_P02_period-lenhart2015-scaled:
  mass: 62 [kg]
  height: -1
  age: -1
  ModelScaler:
    apply: true
    scaling_order: measurements
    marker_file: Static 1.trc
    time_range: 0.2 0.3
    preserve_mass_distribution: true
    MeasurementSet:
      Measurement pelvis_xy: apply=true
        MarkerPair: markers=(WaistLFront WaistRFront)
        MarkerPair: markers=(WaistLFront WaistBack)
        MarkerPair: markers=(WaistRFront WaistBack)
        BodyScale pelvis: axes=(X Y Z)
      Measurement thigh_jc_y: apply=false
        MarkerPair: markers=(LHJC LKJC)
        MarkerPair: markers=(RHJC RKJC)
      Measurement shank_jc_y: apply=false
        MarkerPair: markers=(LKJC LAJC)
        MarkerPair: markers=(RKJC RAJC)
      Measurement foot_x: apply=true
        MarkerPair: markers=(LHeelBack LForefoot2)
        MarkerPair: markers=(RHeelBack RForefoot2)
        BodyScale talus_r: axes=(X Y Z)
        BodyScale calcn_r: axes=(X Y Z)
        BodyScale toes_r: axes=(X Y Z)
        BodyScale talus_l: axes=(X Y Z)
        BodyScale calcn_l: axes=(X Y Z)
        BodyScale toes_l: axes=(X Y Z)
      Measurement torso_xyz: apply=true
        MarkerPair: markers=(WaistBack SpineThoracic2)
        MarkerPair: markers=(LShoulderTop RShoulderTop)
        MarkerPair: markers=(Chest SpineThoracic12)
        BodyScale torso: axes=(X Y Z)
        BodyScale neckhead: axes=(X Y Z)
      Measurement thigh_y: apply=true
        MarkerPair: markers=(WaistLFront LKneeOut)
        MarkerPair: markers=(WaistRFront RKneeOut)
        BodyScale femur_l: axes=(X Y Z)
        BodyScale femur_distal_l: axes=(X Y Z)
        BodyScale patella_l: axes=(X Y Z)
        BodyScale femur_r: axes=(X Y Z)
        BodyScale patella_r: axes=(X Y Z)
      Measurement shank_y: apply=true
        MarkerPair: markers=(LKneeOut LAnkleOut)
        MarkerPair: markers=(RKneeOut RAnkleOut)
        BodyScale tibia_proximal_l: axes=(X Y Z)
        BodyScale tibia_l: axes=(X Y Z)
        BodyScale tibia_r: axes=(X Y Z)
  MarkerPlacer:
    apply: true
    marker_file: Static 1.trc
    time_range: 0.2 0.3
    output_motion_file: C:\Users\b1097908\Documents\GitHub\osimProcessing-GitLab\_data\pilot_mc\A_P02\2024-05-16_01_period\A_P02_period-lenhart2015-scaled_motion.mot
    output_model_file: C:\Users\b1097908\Documents\GitHub\osimProcessing-GitLab\_data\pilot_mc\A_P02\2024-05-16_01_period\A_P02_period-lenhart2015-scaled.osim
    output_marker_file: C:\Users\b1097908\Documents\GitHub\osimProcessing-GitLab\_data\pilot_mc\A_P02\2024-05-16_01_period\A_P02_period-lenhart2015-scaled_marker.xml
    max_marker_movement: -1
    IKTaskSet:
      IKMarkerTask HeadL: apply=true weight=1
      IKMarkerTask HeadR: apply=true weight=1
      IKMarkerTask HeadFront: apply=true weight=1
      IKMarkerTask Chest: apply=true weight=1
      IKMarkerTask SpineThoracic2: apply=true weight=1
      IKMarkerTask SpineThoracic12: apply=false weight=1
      IKMarkerTask LShoulderTop: apply=true weight=1
      IKMarkerTask RShoulderTop: apply=true weight=1
      IKMarkerTask WaistLFront: apply=true weight=1
      IKMarkerTask WaistL: apply=true weight=1
      IKMarkerTask WaistBack: apply=true weight=1
      IKMarkerTask WaistR: apply=true weight=1
      IKMarkerTask WaistRFront: apply=true weight=1
      IKMarkerTask LTroch: apply=false weight=1
      IKMarkerTask LThighFrontLow: apply=true weight=1
      IKMarkerTask LKneeOut: apply=true weight=1
      IKMarkerTask LKneeIn: apply=true weight=1
      IKMarkerTask LShinFrontHigh: apply=true weight=1
      IKMarkerTask LAnkleOut: apply=true weight=1
      IKMarkerTask LHeelBack: apply=true weight=1
      IKMarkerTask LAnkleIn: apply=false weight=1
      IKMarkerTask LForefoot5: apply=true weight=1
      IKMarkerTask LForefoot2: apply=true weight=1
      IKMarkerTask LHJC: apply=false weight=1
      IKMarkerTask LKJC: apply=false weight=1
      IKMarkerTask LAJC: apply=false weight=1
      IKMarkerTask RTroch: apply=false weight=1
      IKMarkerTask RThighFrontLow: apply=true weight=1
      IKMarkerTask RKneeOut: apply=true weight=1
      IKMarkerTask RKneeIn: apply=true weight=1
      IKMarkerTask RShinFrontHigh: apply=true weight=1
      IKMarkerTask RAnkleOut: apply=true weight=1
      IKMarkerTask RHeelBack: apply=true weight=1
      IKMarkerTask RAnkleIn: apply=false weight=1
      IKMarkerTask RForefoot5: apply=true weight=1
      IKMarkerTask RForefoot2: apply=true weight=1
      IKMarkerTask RHJC: apply=false weight=1
      IKMarkerTask RKJC: apply=false weight=1
      IKMarkerTask RAJC: apply=false weight=1
