# OpenSim document version 40000
InverseKinematicsTool:
  results_directory: ./
  constraint_weight: Inf
  accuracy: 1e-5
  time_range: -1 -1
  report_errors: true
  report_marker_locations: false
  IKTaskSet:
    IKMarkerTask HeadL: apply=true weight=1
    IKMarkerTask HeadR: apply=true weight=1
    IKMarkerTask HeadFront: apply=true weight=1
    IKMarkerTask Chest: apply=true weight=1
    IKMarkerTask SpineThoracic2: apply=true weight=1
    IKMarkerTask SpineThoracic12: apply=false weight=0
    IKMarkerTask LShoulderTop: apply=true weight=1
    IKMarkerTask RShoulderTop: apply=true weight=1
    IKMarkerTask WaistLFront: apply=true weight=1
    IKMarkerTask WaistL: apply=true weight=1
    IKMarkerTask WaistBack: apply=true weight=1
    IKMarkerTask WaistR: apply=true weight=1
    IKMarkerTask WaistRFront: apply=true weight=1
    IKMarkerTask LTroch: apply=false weight=1
    IKMarkerTask LThighFrontLow: apply=true weight=1
    IKMarkerTask LKneeOut: apply=true weight=1
    IKMarkerTask LKneeIn: apply=true weight=1
    IKMarkerTask LShinFrontHigh: apply=true weight=1
    IKMarkerTask LAnkleOut: apply=true weight=1
    IKMarkerTask LHeelBack: apply=true weight=1
    IKMarkerTask LAnkleIn: apply=false weight=1
    IKMarkerTask LForefoot5: apply=true weight=1
    IKMarkerTask LForefoot2: apply=true weight=1
    IKMarkerTask LHJC: apply=false weight=1
    IKMarkerTask LKJC: apply=false weight=1
    IKMarkerTask LAJC: apply=false weight=1
    IKMarkerTask RTroch: apply=false weight=1
    IKMarkerTask RThighFrontLow: apply=true weight=1
    IKMarkerTask RKneeOut: apply=true weight=1
    IKMarkerTask RKneeIn: apply=true weight=1
    IKMarkerTask RShinFrontHigh: apply=true weight=1
    IKMarkerTask RAnkleOut: apply=true weight=1
    IKMarkerTask RHeelBack: apply=true weight=1
    IKMarkerTask RAnkleIn: apply=false weight=1
    IKMarkerTask RForefoot5: apply=true weight=1
    IKMarkerTask RForefoot2: apply=true weight=1
    IKMarkerTask RHJC: apply=false weight=1
    IKMarkerTask RKJC: apply=false weight=1
    IKMarkerTask RAJC: apply=false weight=1
