# OpenSim document version 40000
COMAKInverseKinematicsTool:
  model_file: ../../../../myModels/lenhart_kul_right_unlocked-scaled.osim
  results_directory: ../results/comak-inverse-kinematics
  results_prefix: walking
  perform_secondary_constraint_sim: true
  secondary_coordinates: /jointset/knee_r/knee_add_r /jointset/knee_r/knee_rot_r /jointset/knee_r/knee_tx_r /jointset/knee_r/knee_ty_r /jointset/knee_r/knee_tz_r /jointset/pf_r/pf_flex_r /jointset/pf_r/pf_rot_r /jointset/pf_r/pf_tilt_r /jointset/pf_r/pf_tx_r /jointset/pf_r/pf_ty_r /jointset/pf_r/pf_tz_r
  secondary_coupled_coordinate: /jointset/knee_r/knee_flex_r
  secondary_constraint_sim_settle_time: 0.5
  secondary_constraint_sim_sweep_time: 3
  secondary_coupled_coordinate_start_value: 0 [meters]
  secondary_coupled_coordinate_stop_value: 120 [meters]
  secondary_constraint_sim_integrator_accuracy: 1e-6
  secondary_constraint_function_file: ../results/comak-inverse-kinematics/my-secondary_coordinate_constraint_functions.xml
  print_secondary_constraint_sim_results: false
  perform_inverse_kinematics: true
  use_visualizer: false
  verbose: 0
  InverseKinematicsTool:
    results_directory: ../results/comak-inverse-kinematics
    constraint_weight: Inf
    accuracy: 1e-5
    marker_file: ../../../../../../data/AK-data/2018-08-21-trc-mot/Dynamic11_marker.trc
    time_range: 1.9 2.9
    report_errors: true
    output_motion_file: ../results/comak-inverse-kinematics/Dynamic11_marker_ik.mot
    report_marker_locations: false
    IKTaskSet:
      IKMarkerTask LASI: apply=true weight=15
      IKMarkerTask RASI: apply=true weight=15
      IKMarkerTask LPSI: apply=true weight=15
      IKMarkerTask RPSI: apply=true weight=15
      IKMarkerTask RTH1: apply=true weight=5
      IKMarkerTask RTH2: apply=true weight=5
      IKMarkerTask RTH3: apply=true weight=5
      IKMarkerTask RTB1: apply=true weight=5
      IKMarkerTask RTB2: apply=true weight=5
      IKMarkerTask RTB3: apply=true weight=5
      IKMarkerTask RTOE: apply=true weight=20
      IKMarkerTask RHEE: apply=true weight=20
      IKMarkerTask LTH1: apply=true weight=5
      IKMarkerTask LTH2: apply=true weight=5
      IKMarkerTask LTH3: apply=true weight=5
      IKMarkerTask LTB1: apply=true weight=5
      IKMarkerTask LTB2: apply=true weight=5
      IKMarkerTask LTB3: apply=true weight=5
      IKMarkerTask LTOE: apply=true weight=20
      IKMarkerTask LHEE: apply=true weight=20
      IKMarkerTask CLAV: apply=true weight=10
      IKMarkerTask STRN: apply=true weight=10
      IKMarkerTask RDM5: apply=true weight=5
      IKMarkerTask LDM5: apply=true weight=5
      IKMarkerTask RBAK: apply=true weight=5
      IKMarkerTask C7: apply=true weight=15
      IKMarkerTask T10: apply=true weight=10
