# OpenSim document version 40000
MarkerSet:
  Marker LASI: pelvis (0.01017934 -0.001613775 -0.154377)
  Marker LPSI: pelvis (-0.17235 0.01960992 -0.04494886)
  Marker RTH1: femur_r (0.01608012 -0.1621922 0.07713154)
  Marker RTH2: femur_r (-0.01360724 -0.2180128 0.07145833)
  Marker RTH3: femur_r (0.03298217 -0.2203967 0.05569122)
  Marker RTB1: tibia_r (0.02437524 -0.163686 0.09691839)
  Marker RTB2: tibia_r (-0.011053 -0.2182365 0.08958186)
  Marker RTB3: tibia_r (0.03916847 -0.2245105 0.08187492)
  Marker RHEE: calcn_r (-0.01088978 0.02535822 -0.008141791)
  Marker RTOE: toes_r (0.003999299 0.01648245 -0.006398202)
  Marker LTOE: toes_l (0.0135328 0.01404595 0.01237237)
  Marker LHEE: calcn_l (-0.01574101 0.02030152 0.006641862)
  Marker LDM5: toes_l (-0.02908279 0.00483186 -0.05991335)
  Marker LTB2: tibia_l (-0.05354266 -0.219104 -0.05126543)
  Marker LTB3: tibia_l (-0.0114638 -0.2189002 -0.05815678)
  Marker LTB1: tibia_l (-0.03338494 -0.1714765 -0.05392917)
  Marker LTH1: femur_l (-0.0004653123 -0.1717965 -0.06466744)
  Marker LTH2: femur_l (-0.02071355 -0.223155 -0.06061556)
  Marker LTH3: femur_l (0.0176506 -0.223044 -0.04363179)
  Marker CLAV: torso (0.03154762 0.3323407 0.001059653)
  Marker STRN: torso (0.1078156 0.2149377 0.001732706)
  Marker T10: torso (-0.1308663 0.1885599 0) fixed=true
  Marker RBAK: torso (-0.1267898 0.2826914 0.07999214) fixed=true
  Marker C7: torso (-0.08773243 0.3686454 -0.003796082)
  Marker RPSI: pelvis (-0.17235 0.0196099 0.0449489)
  Marker RD5M: toes_r (-0.048984 0.0001479905 0.05563211)
  Marker RKNE: femur_r (0.01647383 -0.3698891 0.06038805)
  Marker RMKNE: femur_r (0.0128668 -0.3693783 -0.063211)
  Marker RANK: tibia_r (-0.009802918 -0.3911188 0.04682858)
  Marker RMMA: tibia_r (-0.00980292 -0.391119 -0.04329116)
  Marker LMKNE: femur_l (0.0128668 -0.369378 0.063211)
  Marker LKNE: femur_l (0.0164738 -0.369889 -0.0603881)
  Marker LANK: tibia_l (-0.00980292 -0.391119 -0.0468286)
  Marker LMMA: tibia_l (-0.00980292 -0.391119 0.0432912)
  Marker RASI: pelvis (0.0101793 -0.00161377 0.154377)
