# OpenSim document version 40000
ScaleTool lenhart2015-scaled:
  mass: 62 [kg]
  height: -1
  age: -1
  GenericModelMaker:
    marker_set_file: ISW_MarkerSet_COMAK.xml
  ModelScaler:
    apply: true
    scaling_order: measurements manualScale
    time_range: -1 -1
    preserve_mass_distribution: true
    MeasurementSet:
      Measurement Pelvis_width: apply=false
        MarkerPair: markers=(RASI LASI)
      Measurement Pelvis_depth: apply=false
        MarkerPair: markers=(RASI LPSI)
        MarkerPair: markers=(LASI LPSI)
      Measurement Pelvis_heigt: apply=false
        MarkerPair: markers=(RASI LPSI)
        MarkerPair: markers=(LASI RPSI)
        MarkerPair: markers=(RASI LASI)
      Measurement femur_r: apply=true
        MarkerPair: markers=(RASI RKNE)
        MarkerPair: markers=(RASI RMKNE)
        BodyScale femur_r: axes=(X Y Z)
      Measurement tibia_r: apply=true
        MarkerPair: markers=(RKNE RANK)
        MarkerPair: markers=(RMKNE RMMA)
        BodyScale tibia_r: axes=(X Y Z)
      Measurement foot_l: apply=true
        MarkerPair: markers=(LHEE LTOE)
        MarkerPair: markers=(LHEE LDM5)
        BodyScale talus_l: axes=(X Y Z)
        BodyScale calcn_l: axes=(X Y Z)
        BodyScale toes_l: axes=(X Y Z)
      Measurement upper_body: apply=true
        MarkerPair: markers=(RASI C7)
        MarkerPair: markers=(LASI C7)
        MarkerPair: markers=(LPSI C7)
        MarkerPair: markers=(RPSI C7)
        BodyScale torso: axes=(X Y Z)
        BodyScale neckhead: axes=(X Y Z)
        BodyScale humerus_r: axes=(X Y Z)
        BodyScale ulna_r: axes=(X Y Z)
        BodyScale radius_r: axes=(X Y Z)
        BodyScale hand_r: axes=(X Y Z)
        BodyScale humerus_l: axes=(X Y Z)
        BodyScale ulna_l: axes=(X Y Z)
        BodyScale radius_l: axes=(X Y Z)
        BodyScale hand_l: axes=(X Y Z)
      Measurement pelvis: apply=true
        MarkerPair: markers=(RASI LASI)
        MarkerPair: markers=(RASI RPSI)
        MarkerPair: markers=(LASI LPSI)
        BodyScale pelvis: axes=(X Y Z)
      Measurement leg_comak: apply=true
        MarkerPair: markers=(RASI RKNE)
        MarkerPair: markers=(RASI RMKNE)
        MarkerPair: markers=(RKNE RANK)
        MarkerPair: markers=(RMKNE RMMA)
        BodyScale femur_distal_r: axes=(X Y Z)
        BodyScale patella_r: axes=(X Y Z)
        BodyScale tibia_proximal_r: axes=(X Y Z)
      Measurement femur_l: apply=true
        MarkerPair: markers=(LASI LKNE)
        MarkerPair: markers=(LASI LMKNE)
        BodyScale femur_l: axes=(X Y Z)
        BodyScale patella_l: axes=(X Y Z)
      Measurement tibia_l: apply=true
        MarkerPair: markers=(LKNE LANK)
        MarkerPair: markers=(LMKNE LMMA)
        BodyScale tibia_l: axes=(X Y Z)
      Measurement foot_r: apply=true
        MarkerPair: markers=(RHEE RTOE)
        MarkerPair: markers=(RHEE RD5M)
        BodyScale talus_r: axes=(X Y Z)
        BodyScale calcn_r: axes=(X Y Z)
        BodyScale toes_r: axes=(X Y Z)
    ScaleSet:
      Scale: scales=(0.9 0.9 0.9) segment=pelvis apply=false
      Scale: scales=(1.2 1.2 1.2) segment=femur_r apply=false
      Scale: scales=(1.2 1.2 1.2) segment=femur_distal_r apply=false
      Scale: scales=(1.2 1.2 1.2) segment=patella_r apply=false
      Scale: scales=(1.2 1.2 1.2) segment=tibia_proximal_r apply=false
      Scale: scales=(0.9 0.9 0.9) segment=tibia_r apply=false
      Scale: scales=(0.9 0.9 0.9) segment=talus_r apply=false
      Scale: scales=(0.9 0.9 0.9) segment=calcn_r apply=false
      Scale: scales=(0.9 0.9 0.9) segment=toes_r apply=false
      Scale: scales=(0.9 0.9 0.9) segment=femur_l apply=false
      Scale: scales=(0.9 0.9 0.9) segment=patella_l apply=false
      Scale: scales=(0.9 0.9 0.9) segment=tibia_l apply=false
      Scale: scales=(0.9 0.9 0.9) segment=talus_l apply=false
      Scale: scales=(0.9 0.9 0.9) segment=calcn_l apply=false
      Scale: scales=(0.9 0.9 0.9) segment=toes_l apply=false
      Scale: scales=(0.9 0.9 0.9) segment=torso apply=false
      Scale: scales=(0.9 0.9 0.9) segment=neckhead apply=false
      Scale: scales=(0.9 0.9 0.9) segment=humerus_r apply=false
      Scale: scales=(0.9 0.9 0.9) segment=ulna_r apply=false
      Scale: scales=(0.9 0.9 0.9) segment=radius_r apply=false
      Scale: scales=(0.9 0.9 0.9) segment=hand_r apply=false
      Scale: scales=(0.9 0.9 0.9) segment=humerus_l apply=false
      Scale: scales=(0.9 0.9 0.9) segment=ulna_l apply=false
      Scale: scales=(0.9 0.9 0.9) segment=radius_l apply=false
      Scale: scales=(0.9 0.9 0.9) segment=hand_l apply=false
  MarkerPlacer:
    apply: true
    time_range: -1 -1
    max_marker_movement: -1
    IKTaskSet:
      IKMarkerTask LASI: apply=true weight=15
      IKMarkerTask LPSI: apply=true weight=10
      IKMarkerTask RTH1: apply=true weight=5
      IKMarkerTask RTH2: apply=true weight=5
      IKMarkerTask RTH3: apply=true weight=5
      IKMarkerTask RTB1: apply=true weight=5
      IKMarkerTask RTB2: apply=true weight=5
      IKMarkerTask RTB3: apply=true weight=5
      IKMarkerTask RHEE: apply=true weight=10
      IKMarkerTask RTOE: apply=true weight=5
      IKMarkerTask LTOE: apply=true weight=5
      IKMarkerTask LHEE: apply=true weight=10
      IKMarkerTask LDM5: apply=true weight=10
      IKMarkerTask LTB2: apply=true weight=5
      IKMarkerTask LTB3: apply=true weight=5
      IKMarkerTask LTB1: apply=true weight=5
      IKMarkerTask LTH1: apply=true weight=5
      IKMarkerTask LTH2: apply=true weight=5
      IKMarkerTask LTH3: apply=true weight=5
      IKMarkerTask CLAV: apply=true weight=3
      IKMarkerTask STRN: apply=true weight=3
      IKMarkerTask T10: apply=true weight=3
      IKMarkerTask RBAK: apply=true weight=1
      IKMarkerTask C7: apply=true weight=5
      IKMarkerTask RPSI: apply=true weight=10
      IKMarkerTask RD5M: apply=true weight=10
      IKMarkerTask RKNE: apply=true weight=10
      IKMarkerTask RMKNE: apply=true weight=10
      IKMarkerTask RANK: apply=true weight=10
      IKMarkerTask RMMA: apply=true weight=10
      IKMarkerTask LMKNE: apply=true weight=10
      IKMarkerTask LKNE: apply=true weight=10
      IKMarkerTask LANK: apply=true weight=10
      IKMarkerTask LMMA: apply=true weight=10
      IKMarkerTask RASI: apply=true weight=15
