# OpenSim document version 40000
COMAKInverseKinematicsTool:
  model_file: C:\COMAK\GenericPIDataset\1224\comak-generic_PI_CE200_1122\OActiveRight_PlugLower-scaled_MslScaled_generic_PI_CE200_1122.osim
  results_directory: C:\COMAK\GenericPIDataset\1224\comak-generic_PI_CE200_1122\JAM\generic_PI_CE200_1122_Dynamic8_r\inverse-kinematics\
  results_prefix: generic_PI_CE200_1122_Dynamic8_r
  perform_secondary_constraint_sim: false
  secondary_coordinates: /jointset/knee_r/knee_add_r /jointset/knee_r/knee_rot_r /jointset/knee_r/knee_tx_r /jointset/knee_r/knee_ty_r /jointset/knee_r/knee_tz_r /jointset/pf_r/pf_flex_r /jointset/pf_r/pf_rot_r /jointset/pf_r/pf_tilt_r /jointset/pf_r/pf_tx_r /jointset/pf_r/pf_ty_r /jointset/pf_r/pf_tz_r
  secondary_coupled_coordinate: /jointset/knee_r/knee_flex_r
  secondary_constraint_sim_settle_time: 0.5
  secondary_constraint_sim_sweep_time: 3
  secondary_coupled_coordinate_start_value: 0 [meters]
  secondary_coupled_coordinate_stop_value: 120 [meters]
  secondary_constraint_sim_integrator_accuracy: 1e-6
  secondary_constraint_function_file: C:\COMAK\GenericPIDataset\1224\comak-generic_PI_CE200_1122\JAM\generic_IK_second_coord_constraint_functions_right.xml
  print_secondary_constraint_sim_results: true
  perform_inverse_kinematics: true
  use_visualizer: false
  verbose: 2
  InverseKinematicsTool:
    results_directory: ./
    model_file: OActiveLeft_scaled
    constraint_weight: Inf
    accuracy: 1e-5
    marker_file: dynamic19_marker.trc
    time_range: 1.9 2.9
    report_errors: true
    output_motion_file: dynamic19_marker_ik.mot
    report_marker_locations: false
    IKTaskSet:
      IKMarkerTask LASI: apply=true weight=75
      IKMarkerTask RASI: apply=true weight=75
      IKMarkerTask SACR: apply=true weight=75
      IKMarkerTask RKNE: apply=false weight=0
      IKMarkerTask RT1: apply=true weight=100
      IKMarkerTask RT2: apply=true weight=100
      IKMarkerTask RT3: apply=true weight=100
      IKMarkerTask RANK: apply=false weight=0
      IKMarkerTask RS1: apply=true weight=100
      IKMarkerTask RS2: apply=true weight=100
      IKMarkerTask RS3: apply=true weight=100
      IKMarkerTask RTOE: apply=true weight=75
      IKMarkerTask RHEE: apply=true weight=75
      IKMarkerTask LKNE: apply=false weight=0
      IKMarkerTask LT1: apply=true weight=100
      IKMarkerTask LT2: apply=true weight=100
      IKMarkerTask LT3: apply=true weight=100
      IKMarkerTask LANK: apply=false weight=0
      IKMarkerTask LS1: apply=true weight=100
      IKMarkerTask LS2: apply=true weight=100
      IKMarkerTask LS3: apply=true weight=100
      IKMarkerTask LTOE: apply=true weight=75
      IKMarkerTask LHEE: apply=true weight=75
