# OpenSim document version 40000
COMAKTool:
  model_file: ../../../models/lenhart2015/lenhart2015.osim
  coordinates_file: ../results/comak-inverse-kinematics/overground_17_ik.mot
  external_loads_file: ../../../models/lenhart2015/motion_data/overground_17_ext_loads.xml
  results_directory: ../results/comak/
  results_prefix: walking
  replace_force_set: false
  force_set_file: ../../../models/lenhart2015/lenhart2015_reserve_actuators.xml
  start_time: 1.21
  stop_time: 2.32
  time_step: 0.01
  lowpass_filter_frequency: 6
  print_processed_input_kinematics: false
  prescribed_coordinates: /jointset/gnd_pelvis/pelvis_tx /jointset/gnd_pelvis/pelvis_ty /jointset/gnd_pelvis/pelvis_tz /jointset/gnd_pelvis/pelvis_tilt /jointset/gnd_pelvis/pelvis_list /jointset/gnd_pelvis/pelvis_rot /jointset/subtalar_l/subt_angle_l /jointset/mtp_l/mtp_angle_l /jointset/hip_r/hip_flex_r /jointset/hip_r/hip_add_r /jointset/hip_r/hip_rot_r /jointset/pf_r/pf_r_r3 /jointset/pf_r/pf_r_tx /jointset/pf_r/pf_r_ty /jointset/knee_r/knee_flex_r /jointset/ankle_r/ankle_flex_r /jointset/subtalar_r/subt_angle_r /jointset/mtp_r/mtp_angle_r /jointset/pelvis_torso/lumbar_ext /jointset/pelvis_torso/lumbar_latbend /jointset/pelvis_torso/lumbar_rot /jointset/torso_neckhead/neck_ext /jointset/torso_neckhead/neck_latbend /jointset/torso_neckhead/neck_rot /jointset/acromial_r/arm_add_r /jointset/acromial_r/arm_flex_r /jointset/acromial_r/arm_rot_r /jointset/elbow_r/elbow_flex_r /jointset/radioulnar_r/pro_sup_r /jointset/radius_hand_r/wrist_flex_r /jointset/acromial_l/arm_add_l /jointset/acromial_l/arm_flex_l /jointset/acromial_l/arm_rot_l /jointset/elbow_l/elbow_flex_l /jointset/radioulnar_l/pro_sup_l /jointset/radius_hand_l/wrist_flex_l
  primary_coordinates: /jointset/hip_l/hip_flex_l /jointset/hip_l/hip_add_l /jointset/hip_l/hip_rot_l /jointset/knee_l/knee_flex_l /jointset/ankle_l/ankle_flex_l
  settle_secondary_coordinates_at_start: true
  settle_threshold: 1e-4
  settle_accuracy: 1e-5
  settle_internal_step_limit: 50000
  print_settle_sim_results: true
  settle_sim_results_directory: ../results/comak
  settle_sim_results_prefix: walking_settle_sim
  max_iterations: 25
  udot_tolerance: 1
  udot_worse_case_tolerance: 50
  unit_udot_epsilon: 1e-8
  contact_energy_weight: 10
  use_visualizer: false
  verbose: 0
  COMAKSecondaryCoordinateSet:
    COMAKSecondaryCoordinate knee_add_l: coordinate=/jointset/knee_l/knee_add_l comak_damping=5 max_change=0.05
    COMAKSecondaryCoordinate knee_rot_l: coordinate=/jointset/knee_l/knee_rot_l comak_damping=5 max_change=0.05
    COMAKSecondaryCoordinate knee_tx_l: coordinate=/jointset/knee_l/knee_tx_l comak_damping=200 max_change=0.05
    COMAKSecondaryCoordinate knee_ty_l: coordinate=/jointset/knee_l/knee_ty_l comak_damping=200 max_change=0.05
    COMAKSecondaryCoordinate knee_tz_l: coordinate=/jointset/knee_l/knee_tz_l comak_damping=200 max_change=0.05
    COMAKSecondaryCoordinate pf_flex_l: coordinate=/jointset/pf_l/pf_flex_l comak_damping=0.1 max_change=0.05
    COMAKSecondaryCoordinate pf_rot_l: coordinate=/jointset/pf_l/pf_rot_l comak_damping=2 max_change=0.05
    COMAKSecondaryCoordinate pf_tilt_l: coordinate=/jointset/pf_l/pf_tilt_l comak_damping=2 max_change=0.05
    COMAKSecondaryCoordinate pf_tx_l: coordinate=/jointset/pf_l/pf_tx_l comak_damping=30 max_change=0.05
    COMAKSecondaryCoordinate pf_ty_l: coordinate=/jointset/pf_l/pf_ty_l comak_damping=30 max_change=0.05
    COMAKSecondaryCoordinate pf_tz_l: coordinate=/jointset/pf_l/pf_tz_l comak_damping=30 max_change=0.05
  COMAKCostFunctionParameterSet:
    COMAKCostFunctionParameter addbrev_l: actuator=/forceset/addbrev_l weight=Constant(value=1)
    COMAKCostFunctionParameter addlong_l: actuator=/forceset/addlong_l weight=Constant(value=1)
    COMAKCostFunctionParameter addmagProx_l: actuator=/forceset/addmagProx_l weight=Constant(value=1)
    COMAKCostFunctionParameter addmagMid_l: actuator=/forceset/addmagMid_l weight=Constant(value=1)
    COMAKCostFunctionParameter addmagDist_l: actuator=/forceset/addmagDist_l weight=Constant(value=1)
    COMAKCostFunctionParameter addmagIsch_l: actuator=/forceset/addmagIsch_l weight=Constant(value=1)
    COMAKCostFunctionParameter bflh_l: actuator=/forceset/bflh_l weight=Constant(value=2)
    COMAKCostFunctionParameter bfsh_l: actuator=/forceset/bfsh_l weight=Constant(value=2)
    COMAKCostFunctionParameter edl_l: actuator=/forceset/edl_l weight=Constant(value=1)
    COMAKCostFunctionParameter ehl_l: actuator=/forceset/ehl_l weight=Constant(value=1)
    COMAKCostFunctionParameter fdl_l: actuator=/forceset/fdl_l weight=Constant(value=1)
    COMAKCostFunctionParameter fhl_l: actuator=/forceset/fhl_l weight=Constant(value=1)
    COMAKCostFunctionParameter gaslat_l: actuator=/forceset/gaslat_l weight=Constant(value=7)
    COMAKCostFunctionParameter gasmed_l: actuator=/forceset/gasmed_l weight=Constant(value=4)
    COMAKCostFunctionParameter gem_l: actuator=/forceset/gem_l weight=Constant(value=1)
    COMAKCostFunctionParameter glmax1_l: actuator=/forceset/glmax1_l weight=Constant(value=1)
    COMAKCostFunctionParameter glmax2_l: actuator=/forceset/glmax2_l weight=Constant(value=1)
    COMAKCostFunctionParameter glmax3_l: actuator=/forceset/glmax3_l weight=Constant(value=1)
    COMAKCostFunctionParameter glmed1_l: actuator=/forceset/glmed1_l weight=Constant(value=0.9)
    COMAKCostFunctionParameter glmed2_l: actuator=/forceset/glmed2_l weight=Constant(value=0.9)
    COMAKCostFunctionParameter glmed3_l: actuator=/forceset/glmed3_l weight=Constant(value=0.9)
    COMAKCostFunctionParameter glmin1_l: actuator=/forceset/glmin1_l weight=Constant(value=0.9)
    COMAKCostFunctionParameter glmin2_l: actuator=/forceset/glmin2_l weight=Constant(value=0.9)
    COMAKCostFunctionParameter glmin3_l: actuator=/forceset/glmin3_l weight=Constant(value=0.9)
    COMAKCostFunctionParameter grac_l: actuator=/forceset/grac_l weight=Constant(value=1)
    COMAKCostFunctionParameter iliacus_l: actuator=/forceset/iliacus_l weight=Constant(value=1)
    COMAKCostFunctionParameter pect_l: actuator=/forceset/pect_l weight=Constant(value=1)
    COMAKCostFunctionParameter perbrev_l: actuator=/forceset/perbrev_l weight=Constant(value=1)
    COMAKCostFunctionParameter perlong_l: actuator=/forceset/perlong_l weight=Constant(value=1)
    COMAKCostFunctionParameter pertert_l: actuator=/forceset/pertert_l weight=Constant(value=1)
    COMAKCostFunctionParameter piri_l: actuator=/forceset/piri_l weight=Constant(value=1)
    COMAKCostFunctionParameter psoas_l: actuator=/forceset/psoas_l weight=Constant(value=1)
    COMAKCostFunctionParameter quadfem_l: actuator=/forceset/quadfem_l weight=Constant(value=1)
    COMAKCostFunctionParameter recfem_l: actuator=/forceset/recfem_l weight=Constant(value=3)
    COMAKCostFunctionParameter sart_l: actuator=/forceset/sart_l weight=Constant(value=1)
    COMAKCostFunctionParameter semimem_l: actuator=/forceset/semimem_l weight=Constant(value=2)
    COMAKCostFunctionParameter semiten_l: actuator=/forceset/semiten_l weight=Constant(value=2)
    COMAKCostFunctionParameter soleus_l: actuator=/forceset/soleus_l weight=Constant(value=0.9)
    COMAKCostFunctionParameter tfl_l: actuator=/forceset/tfl_l weight=Constant(value=1)
    COMAKCostFunctionParameter tibant_l: actuator=/forceset/tibant_l weight=Constant(value=1)
    COMAKCostFunctionParameter tibpost_l: actuator=/forceset/tibpost_l weight=Constant(value=1)
    COMAKCostFunctionParameter vasint_l: actuator=/forceset/vasint_l weight=Constant(value=1)
    COMAKCostFunctionParameter vaslat_l: actuator=/forceset/vaslat_l weight=Constant(value=1)
    COMAKCostFunctionParameter vasmed_l: actuator=/forceset/vasmed_l weight=Constant(value=1)
