# OpenSim document version 40000
ScaleTool lenhart2015-scaled:
  mass: 57 [kg]
  height: -1
  age: -1
  GenericModelMaker:
    marker_set_file: LKHG_Cleveland_MarkerSet_COMAK.xml
  ModelScaler:
    apply: true
    scaling_order: measurements
    marker_file: Static01_marker.trc
    time_range: 0.0066667 1
    preserve_mass_distribution: true
    output_model_file: OActiveLeft_scaledOnly.osim
    output_scale_file: scaleSet_applied.xml
    MeasurementSet:
      Measurement pelvis_x: apply=true
        MarkerPair: markers=(RASI SACR)
        MarkerPair: markers=(LASI SACR)
        BodyScale pelvis: axes=X
      Measurement pelvis_y: apply=true
        MarkerPair: markers=(RASI LASI)
        BodyScale pelvis: axes=Y
      Measurement pelvis_z: apply=true
        MarkerPair: markers=(RASI LASI)
        BodyScale pelvis: axes=Z
      Measurement femur_l: apply=true
        MarkerPair: markers=(LHJC LKNE)
        BodyScale femur_l: axes=(X Y Z)
        BodyScale patella_l: axes=(X Y Z)
      Measurement femur_r: apply=true
        MarkerPair: markers=(RHJC RKNE)
        BodyScale femur_r: axes=(X Y Z)
        BodyScale femur_distal_r: axes=(X Y Z)
        BodyScale patella_r: axes=(X Y Z)
      Measurement patella: apply=false
        MarkerPair: markers=(RHJC RKNE)
        MarkerPair: markers=(LHJC LKNE)
      Measurement tibia_l: apply=true
        MarkerPair: markers=(LKNE LANK)
        BodyScale tibia_l: axes=(X Y Z)
      Measurement tibia_r: apply=true
        MarkerPair: markers=(RKNE RANK)
        BodyScale tibia_proximal_r: axes=(X Y Z)
        BodyScale tibia_r: axes=(X Y Z)
      Measurement talus_l: apply=true
        MarkerPair: markers=(LHEE LTOE)
        BodyScale talus_l: axes=(X Y Z)
      Measurement talus_r: apply=true
        MarkerPair: markers=(RHEE RTOE)
        BodyScale talus_r: axes=(X Y Z)
      Measurement calcn_l: apply=true
        MarkerPair: markers=(LHEE LTOE)
        BodyScale calcn_l: axes=(X Y Z)
      Measurement calcn_r: apply=true
        MarkerPair: markers=(RHEE RTOE)
        BodyScale calcn_r: axes=(X Y Z)
      Measurement toes_l: apply=true
        MarkerPair: markers=(LHEE LTOE)
        BodyScale toes_l: axes=(X Y Z)
      Measurement toes_r: apply=true
        MarkerPair: markers=(RHEE RTOE)
        BodyScale toes_r: axes=(X Y Z)
      Measurement neckhead: apply=true
        MarkerPair: markers=(RASI RKNE)
        MarkerPair: markers=(LASI LKNE)
        BodyScale neckhead: axes=(X Y Z)
      Measurement torso_x: apply=true
        MarkerPair: markers=(RASI RKNE)
        MarkerPair: markers=(LASI LKNE)
        MarkerPair: markers=(RASI LASI)
        BodyScale torso: axes=X
      Measurement torso_y: apply=true
        MarkerPair: markers=(SACR RKNE)
        MarkerPair: markers=(SACR LKNE)
        BodyScale torso: axes=Y
      Measurement torso_z: apply=true
        MarkerPair: markers=(RASI RKNE)
        MarkerPair: markers=(LASI LKNE)
        MarkerPair: markers=(RASI LASI)
        BodyScale torso: axes=Z
      Measurement humerus: apply=true
        MarkerPair: markers=(RASI RKNE)
        MarkerPair: markers=(LASI LKNE)
        BodyScale humerus_r: axes=(X Y Z)
        BodyScale humerus_l: axes=(X Y Z)
      Measurement radius: apply=true
        MarkerPair: markers=(RASI RKNE)
        MarkerPair: markers=(LASI LKNE)
        BodyScale ulna_r: axes=(X Y Z)
        BodyScale radius_r: axes=(X Y Z)
        BodyScale ulna_l: axes=(X Y Z)
        BodyScale radius_l: axes=(X Y Z)
      Measurement hand: apply=true
        MarkerPair: markers=(RASI RKNE)
        MarkerPair: markers=(LASI LKNE)
        BodyScale hand_r: axes=(X Y Z)
        BodyScale hand_l: axes=(X Y Z)
  MarkerPlacer:
    apply: true
    marker_file: Static01_marker.trc
    time_range: 0.0066667 1
    output_motion_file: static_output.mot
    output_model_file: OActiveRight_scaled.osim
    max_marker_movement: -1
    IKTaskSet:
      IKMarkerTask RASI: apply=true weight=1000
      IKMarkerTask LASI: apply=true weight=1000
      IKMarkerTask SACR: apply=true weight=1000
      IKMarkerTask RHJC: apply=true weight=750
      IKMarkerTask LHJC: apply=true weight=750
      IKMarkerTask RT1: apply=true weight=0
      IKMarkerTask RT2: apply=true weight=0
      IKMarkerTask RT3: apply=true weight=0
      IKMarkerTask RS1: apply=true weight=0
      IKMarkerTask RS2: apply=true weight=0
      IKMarkerTask RS3: apply=true weight=0
      IKMarkerTask RANK: apply=true weight=1000
      IKMarkerTask RHEE: apply=true weight=1000
      IKMarkerTask RTOE: apply=true weight=1000
      IKMarkerTask RKNE: apply=true weight=1000
      IKMarkerTask LTOE: apply=true weight=1000
      IKMarkerTask LHEE: apply=true weight=1000
      IKMarkerTask LANK: apply=true weight=1000
      IKMarkerTask LS2: apply=true weight=0
      IKMarkerTask LS3: apply=true weight=0
      IKMarkerTask LS1: apply=true weight=0
      IKMarkerTask LKNE: apply=true weight=1000
      IKMarkerTask LT1: apply=true weight=0
      IKMarkerTask LT2: apply=true weight=0
      IKMarkerTask LT3: apply=true weight=0
