# OpenSim document version 40000
MarkerSet:
  Marker RASI: pelvis (0.00696511 0.00444607 0.151779)
  Marker LASI: pelvis (0.00696511 0.00444607 -0.151779)
  Marker SACR: pelvis (-0.1794937 0.01868909 0)
  Marker RT1: femur_r (0.0245009 -0.176222 0.0792525)
  Marker RT2: femur_r (-0.0295388 -0.272816 0.0792525)
  Marker RT3: femur_r (0.0494339 -0.272816 0.0792525)
  Marker RS1: tibia_r (0.0245009 -0.176222 0.0792525)
  Marker RS2: tibia_r (-0.0295388 -0.272816 0.0792525)
  Marker RS3: tibia_r (0.0494339 -0.272816 0.0792525)
  Marker RANK: tibia_r (-0.0105021 -0.389823 0.04729439)
  Marker RHEE: calcn_r (-0.0190614 0.0244548 -0.008146477)
  Marker RTOE: toes_r (-0.0186142 0.0244548 0.0123424)
  Marker RKNE: femur_r (0 -0.370594 0.0492517)
  Marker LTOE: toes_l (-0.01861418 0.0244548 -0.01234236)
  Marker LHEE: calcn_l (-0.0190614 0.0244548 0.00814648)
  Marker LANK: tibia_l (-0.0105021 -0.389823 -0.0472944)
  Marker LS2: tibia_l (-0.0295388 -0.272816 -0.0792525)
  Marker LS3: tibia_l (0.0494339 -0.272816 -0.0792525)
  Marker LS1: tibia_l (0.0245009 -0.176222 -0.0792525)
  Marker LKNE: femur_l (0 -0.370594 -0.0492517)
  Marker LT1: femur_l (0.0245009 -0.176222 -0.0792525)
  Marker LT2: femur_l (-0.0295388 -0.272816 -0.0792525)
  Marker LT3: femur_l (0.0494339 -0.272816 -0.0792525)
  Marker LHJC: femur_l (-0.00309716 0.00917997 0.0056739) fixed=true
  Marker RHJC: femur_r (-0.003097156 0.00917997 -0.0056739) fixed=true
