# OpenSim document version 40000
COMAKTool:
  model_file: ../../../models/lenhart2015/lenhart2015.osim
  coordinates_file: ../results/comak-inverse-kinematics/overground_17_ik.mot
  external_loads_file: ../../../models/lenhart2015/motion_data/overground_17_ext_loads.xml
  results_directory: ../results/comak/
  results_prefix: walking
  replace_force_set: false
  force_set_file: ../../../models/lenhart2015/lenhart2015_reserve_actuators.xml
  start_time: 1.21
  stop_time: 2.32
  time_step: 0.01
  lowpass_filter_frequency: 6
  print_processed_input_kinematics: false
  prescribed_coordinates: /jointset/gnd_pelvis/pelvis_tx /jointset/gnd_pelvis/pelvis_ty /jointset/gnd_pelvis/pelvis_tz /jointset/gnd_pelvis/pelvis_tilt /jointset/gnd_pelvis/pelvis_list /jointset/gnd_pelvis/pelvis_rot /jointset/subtalar_r/subt_angle_r /jointset/mtp_r/mtp_angle_r /jointset/hip_l/hip_flex_l /jointset/hip_l/hip_add_l /jointset/hip_l/hip_rot_l /jointset/pf_l/pf_l_r3 /jointset/pf_l/pf_l_tx /jointset/pf_l/pf_l_ty /jointset/knee_l/knee_flex_l /jointset/ankle_l/ankle_flex_l /jointset/subtalar_l/subt_angle_l /jointset/mtp_l/mtp_angle_l /jointset/pelvis_torso/lumbar_ext /jointset/pelvis_torso/lumbar_latbend /jointset/pelvis_torso/lumbar_rot /jointset/torso_neckhead/neck_ext /jointset/torso_neckhead/neck_latbend /jointset/torso_neckhead/neck_rot /jointset/acromial_r/arm_add_r /jointset/acromial_r/arm_flex_r /jointset/acromial_r/arm_rot_r /jointset/elbow_r/elbow_flex_r /jointset/radioulnar_r/pro_sup_r /jointset/radius_hand_r/wrist_flex_r /jointset/acromial_l/arm_add_l /jointset/acromial_l/arm_flex_l /jointset/acromial_l/arm_rot_l /jointset/elbow_l/elbow_flex_l /jointset/radioulnar_l/pro_sup_l /jointset/radius_hand_l/wrist_flex_l
  primary_coordinates: /jointset/hip_r/hip_flex_r /jointset/hip_r/hip_add_r /jointset/hip_r/hip_rot_r /jointset/knee_r/knee_flex_r /jointset/ankle_r/ankle_flex_r
  settle_secondary_coordinates_at_start: true
  settle_threshold: 1e-4
  settle_accuracy: 1e-5
  settle_internal_step_limit: 50000
  print_settle_sim_results: true
  settle_sim_results_directory: ../results/comak
  settle_sim_results_prefix: walking_settle_sim
  max_iterations: 25
  udot_tolerance: 1
  udot_worse_case_tolerance: 50
  unit_udot_epsilon: 1e-8
  contact_energy_weight: 10
  use_visualizer: false
  verbose: 0
  COMAKSecondaryCoordinateSet:
    COMAKSecondaryCoordinate knee_add_r: coordinate=/jointset/knee_r/knee_add_r comak_damping=5 max_change=0.05
    COMAKSecondaryCoordinate knee_rot_r: coordinate=/jointset/knee_r/knee_rot_r comak_damping=5 max_change=0.05
    COMAKSecondaryCoordinate knee_tx_r: coordinate=/jointset/knee_r/knee_tx_r comak_damping=200 max_change=0.05
    COMAKSecondaryCoordinate knee_ty_r: coordinate=/jointset/knee_r/knee_ty_r comak_damping=200 max_change=0.05
    COMAKSecondaryCoordinate knee_tz_r: coordinate=/jointset/knee_r/knee_tz_r comak_damping=200 max_change=0.05
    COMAKSecondaryCoordinate pf_flex_r: coordinate=/jointset/pf_r/pf_flex_r comak_damping=0.1 max_change=0.05
    COMAKSecondaryCoordinate pf_rot_r: coordinate=/jointset/pf_r/pf_rot_r comak_damping=2 max_change=0.05
    COMAKSecondaryCoordinate pf_tilt_r: coordinate=/jointset/pf_r/pf_tilt_r comak_damping=2 max_change=0.05
    COMAKSecondaryCoordinate pf_tx_r: coordinate=/jointset/pf_r/pf_tx_r comak_damping=30 max_change=0.05
    COMAKSecondaryCoordinate pf_ty_r: coordinate=/jointset/pf_r/pf_ty_r comak_damping=30 max_change=0.05
    COMAKSecondaryCoordinate pf_tz_r: coordinate=/jointset/pf_r/pf_tz_r comak_damping=30 max_change=0.05
  COMAKCostFunctionParameterSet:
    COMAKCostFunctionParameter addbrev_r: actuator=/forceset/addbrev_r weight=Constant(value=1)
    COMAKCostFunctionParameter addlong_r: actuator=/forceset/addlong_r weight=Constant(value=1)
    COMAKCostFunctionParameter addmagProx_r: actuator=/forceset/addmagProx_r weight=Constant(value=1)
    COMAKCostFunctionParameter addmagMid_r: actuator=/forceset/addmagMid_r weight=Constant(value=1)
    COMAKCostFunctionParameter addmagDist_r: actuator=/forceset/addmagDist_r weight=Constant(value=1)
    COMAKCostFunctionParameter addmagIsch_r: actuator=/forceset/addmagIsch_r weight=Constant(value=1)
    COMAKCostFunctionParameter bflh_r: actuator=/forceset/bflh_r weight=Constant(value=2)
    COMAKCostFunctionParameter bfsh_r: actuator=/forceset/bfsh_r weight=Constant(value=2)
    COMAKCostFunctionParameter edl_r: actuator=/forceset/edl_r weight=Constant(value=1)
    COMAKCostFunctionParameter ehl_r: actuator=/forceset/ehl_r weight=Constant(value=1)
    COMAKCostFunctionParameter fdl_r: actuator=/forceset/fdl_r weight=Constant(value=1)
    COMAKCostFunctionParameter fhl_r: actuator=/forceset/fhl_r weight=Constant(value=1)
    COMAKCostFunctionParameter gaslat_r: actuator=/forceset/gaslat_r weight=Constant(value=7)
    COMAKCostFunctionParameter gasmed_r: actuator=/forceset/gasmed_r weight=Constant(value=4)
    COMAKCostFunctionParameter gem_r: actuator=/forceset/gem_r weight=Constant(value=1)
    COMAKCostFunctionParameter glmax1_r: actuator=/forceset/glmax1_r weight=Constant(value=1)
    COMAKCostFunctionParameter glmax2_r: actuator=/forceset/glmax2_r weight=Constant(value=1)
    COMAKCostFunctionParameter glmax3_r: actuator=/forceset/glmax3_r weight=Constant(value=1)
    COMAKCostFunctionParameter glmed1_r: actuator=/forceset/glmed1_r weight=Constant(value=0.9)
    COMAKCostFunctionParameter glmed2_r: actuator=/forceset/glmed2_r weight=Constant(value=0.9)
    COMAKCostFunctionParameter glmed3_r: actuator=/forceset/glmed3_r weight=Constant(value=0.9)
    COMAKCostFunctionParameter glmin1_r: actuator=/forceset/glmin1_r weight=Constant(value=0.9)
    COMAKCostFunctionParameter glmin2_r: actuator=/forceset/glmin2_r weight=Constant(value=0.9)
    COMAKCostFunctionParameter glmin3_r: actuator=/forceset/glmin3_r weight=Constant(value=0.9)
    COMAKCostFunctionParameter grac_r: actuator=/forceset/grac_r weight=Constant(value=1)
    COMAKCostFunctionParameter iliacus_r: actuator=/forceset/iliacus_r weight=Constant(value=1)
    COMAKCostFunctionParameter pect_r: actuator=/forceset/pect_r weight=Constant(value=1)
    COMAKCostFunctionParameter perbrev_r: actuator=/forceset/perbrev_r weight=Constant(value=1)
    COMAKCostFunctionParameter perlong_r: actuator=/forceset/perlong_r weight=Constant(value=1)
    COMAKCostFunctionParameter pertert_r: actuator=/forceset/pertert_r weight=Constant(value=1)
    COMAKCostFunctionParameter piri_r: actuator=/forceset/piri_r weight=Constant(value=1)
    COMAKCostFunctionParameter psoas_r: actuator=/forceset/psoas_r weight=Constant(value=1)
    COMAKCostFunctionParameter quadfem_r: actuator=/forceset/quadfem_r weight=Constant(value=1)
    COMAKCostFunctionParameter recfem_r: actuator=/forceset/recfem_r weight=Constant(value=3)
    COMAKCostFunctionParameter sart_r: actuator=/forceset/sart_r weight=Constant(value=1)
    COMAKCostFunctionParameter semimem_r: actuator=/forceset/semimem_r weight=Constant(value=2)
    COMAKCostFunctionParameter semiten_r: actuator=/forceset/semiten_r weight=Constant(value=2)
    COMAKCostFunctionParameter soleus_r: actuator=/forceset/soleus_r weight=Constant(value=0.9)
    COMAKCostFunctionParameter tfl_r: actuator=/forceset/tfl_r weight=Constant(value=1)
    COMAKCostFunctionParameter tibant_r: actuator=/forceset/tibant_r weight=Constant(value=1)
    COMAKCostFunctionParameter tibpost_r: actuator=/forceset/tibpost_r weight=Constant(value=1)
    COMAKCostFunctionParameter vasint_r: actuator=/forceset/vasint_r weight=Constant(value=1)
    COMAKCostFunctionParameter vaslat_r: actuator=/forceset/vaslat_r weight=Constant(value=1)
    COMAKCostFunctionParameter vasmed_r: actuator=/forceset/vasmed_r weight=Constant(value=1)
