# OpenSim document version 40000
MarkerSet:
  Marker RASI: pelvis (0.00696511 0.00444607 0.151779)
  Marker LASI: pelvis (0.00696511 0.00444607 -0.151779)
  Marker SACR: pelvis (-0.1794937 0.01868909 0)
  Marker RTHI: femur_r (0.0245009 -0.176222 0.0792525)
  Marker RTIB: tibia_r (0.0245009 -0.176222 0.0792525)
  Marker RANK: tibia_r (-0.0105021 -0.389823 0.04729439)
  Marker RHEE: calcn_r (-0.0190614 0.0244548 -0.008146477)
  Marker RTOE: toes_r (-0.0186142 0.0244548 0.0123424)
  Marker RKNE: femur_r (0 -0.370594 0.0492517)
  Marker LTOE: toes_l (-0.01861418 0.0244548 -0.01234236)
  Marker LHEE: calcn_l (-0.0190614 0.0244548 0.00814648)
  Marker LANK: tibia_l (-0.0105021 -0.389823 -0.0472944)
  Marker LTIB: tibia_l (0.0245009 -0.176222 -0.0792525)
  Marker LKNE: femur_l (0 -0.370594 -0.0492517)
  Marker LTHI: femur_l (0.0245009 -0.176222 -0.0792525)
