# OpenSim document version 40000
COMAKInverseKinematicsTool:
  model_file: ../../../../myModels/lenhart_kul_right_unlocked-scaled.osim
  results_directory: ../results/comak-inverse-kinematics
  results_prefix: walking
  perform_secondary_constraint_sim: true
  secondary_coordinates: /jointset/knee_r/knee_add_r /jointset/knee_r/knee_rot_r /jointset/knee_r/knee_tx_r /jointset/knee_r/knee_ty_r /jointset/knee_r/knee_tz_r /jointset/pf_r/pf_flex_r /jointset/pf_r/pf_rot_r /jointset/pf_r/pf_tilt_r /jointset/pf_r/pf_tx_r /jointset/pf_r/pf_ty_r /jointset/pf_r/pf_tz_r
  secondary_coupled_coordinate: /jointset/knee_r/knee_flex_r
  secondary_constraint_sim_settle_time: 1
  secondary_constraint_sim_sweep_time: 3
  secondary_coupled_coordinate_start_value: 0 [meters]
  secondary_coupled_coordinate_stop_value: 120 [meters]
  secondary_constraint_sim_integrator_accuracy: 1e-6
  secondary_constraint_function_file: ../results/comak-inverse-kinematics/my-secondary_coordinate_constraint_functions.xml
  print_secondary_constraint_sim_results: false
  perform_inverse_kinematics: true
  use_visualizer: false
  verbose: 0
  InverseKinematicsTool:
    results_directory: ../results/comak-inverse-kinematics
    model_file: unassigned
    constraint_weight: Inf
    accuracy: 1e-4
    marker_file: ../../../../../../data/AK-data/2018-08-21-trc-mot/Dynamic11_marker.trc
    time_range: 1.9 2.9
    report_errors: true
    output_motion_file: ../results/comak-inverse-kinematics/Dynamic11_marker_ik.mot
    report_marker_locations: true
    IKTaskSet:
      IKMarkerTask LASI: apply=true weight=15
      IKMarkerTask RASI: apply=true weight=15
      IKMarkerTask SACR: apply=true weight=20
      IKMarkerTask RKJC: apply=false weight=0
      IKMarkerTask RKNE: apply=true weight=15
      IKMarkerTask RKNM: apply=false weight=0
      IKMarkerTask RT1: apply=true weight=20
      IKMarkerTask RT2: apply=true weight=20
      IKMarkerTask RT3: apply=true weight=20
      IKMarkerTask RAJC: apply=false weight=0
      IKMarkerTask RANK: apply=true weight=20
      IKMarkerTask RANM: apply=false weight=0
      IKMarkerTask RS1: apply=true weight=20
      IKMarkerTask RS2: apply=true weight=20
      IKMarkerTask RS3: apply=true weight=20
      IKMarkerTask RTOE: apply=true weight=20
      IKMarkerTask RHEE: apply=true weight=20
      IKMarkerTask LKJC: apply=false weight=0
      IKMarkerTask LKNE: apply=true weight=15
      IKMarkerTask LKNM: apply=false weight=0
      IKMarkerTask LT1: apply=true weight=20
      IKMarkerTask LT2: apply=true weight=20
      IKMarkerTask LT3: apply=true weight=20
      IKMarkerTask LAJC: apply=false weight=0
      IKMarkerTask LANK: apply=true weight=20
      IKMarkerTask LANM: apply=false weight=0
      IKMarkerTask LS1: apply=true weight=20
      IKMarkerTask LS2: apply=true weight=20
      IKMarkerTask LS3: apply=true weight=20
      IKMarkerTask LTOE: apply=true weight=20
      IKMarkerTask LHEE: apply=true weight=20
      IKMarkerTask RELB: apply=true weight=15
      IKMarkerTask LUPA: apply=true weight=15
      IKMarkerTask LFRA: apply=true weight=15
      IKMarkerTask RFRA: apply=true weight=15
      IKMarkerTask LELB: apply=true weight=15
      IKMarkerTask RUPA: apply=true weight=15
      IKMarkerTask RWRA: apply=true weight=15
      IKMarkerTask LWRA: apply=true weight=15
      IKMarkerTask LWRB: apply=true weight=15
      IKMarkerTask RWRB: apply=true weight=15
      IKMarkerTask LFIN: apply=true weight=15
      IKMarkerTask RFIN: apply=true weight=15
      IKMarkerTask LSHO: apply=true weight=20
      IKMarkerTask RSHO: apply=true weight=20
      IKMarkerTask CLAV: apply=true weight=15
      IKMarkerTask STRN: apply=true weight=10
      IKMarkerTask RFHD: apply=true weight=10
      IKMarkerTask LFHD: apply=true weight=10
      IKMarkerTask RBHD: apply=true weight=10
      IKMarkerTask LBHD: apply=true weight=10
      IKMarkerTask C7: apply=true weight=20
