# OpenSim document version 40000
ScaleTool lenhart2015-scaled:
  mass: 93.3 [kg]
  height: -1
  age: -1
  GenericModelMaker:
    marker_set_file: OSS_Clevland_MarkerSet_COMAK.xml
  ModelScaler:
    apply: true
    scaling_order: measurements
    marker_file: C:/LokaleDaten/CloudStation/MyPapers/2020_GuidedGrowth/code/osimProcessing-GitLab/comak/setupFiles/Models/OSS_FHSTP/../../../../../../../../../../Users/bhorsak/Desktop/comakTesting/v1/Static01_marker.trc
    time_range: 0.0066667 1
    preserve_mass_distribution: true
    MeasurementSet:
      Measurement pelvis_x: apply=false
        MarkerPair: markers=(SACR MIDASIS)
        BodyScale pelvis: axes=X
      Measurement pelvis_y: apply=false
        MarkerPair: markers=(MIDASIS MIDHJC)
        BodyScale pelvis: axes=Y
      Measurement pelvis_z: apply=false
        MarkerPair: markers=(RHJC LHJC)
        BodyScale pelvis: axes=Z
      Measurement femur_l: apply=true
        MarkerPair: markers=(LHJC LKJC)
        BodyScale femur_l: axes=(X Y Z)
        BodyScale patella_l: axes=(X Y Z)
      Measurement tibia_l: apply=true
        MarkerPair: markers=(LKJC LAJC)
        BodyScale tibia_l: axes=(X Y Z)
      Measurement foot_l: apply=true
        MarkerPair: markers=(LHEE LTOE)
        BodyScale talus_l: axes=(X Y Z)
        BodyScale calcn_l: axes=(X Y Z)
        BodyScale toes_l: axes=(X Y Z)
      Measurement neckhead: apply=true
        MarkerPair: markers=(RFHD LBHD)
        MarkerPair: markers=(LFHD RBHD)
        BodyScale neckhead: axes=(X Y Z)
      Measurement torso_x: apply=true
        MarkerPair: markers=(T10 STRN)
        BodyScale torso: axes=X
      Measurement torso_y: apply=true
        MarkerPair: markers=(SACR C7)
        BodyScale torso: axes=Y
      Measurement torso_z: apply=true
        MarkerPair: markers=(RSHO LSHO)
        BodyScale torso: axes=Z
      Measurement humerus: apply=true
        MarkerPair: markers=(RSHO RELB)
        MarkerPair: markers=(LSHO LELB)
        BodyScale humerus_r: axes=(X Y Z)
        BodyScale humerus_l: axes=(X Y Z)
      Measurement radius: apply=true
        MarkerPair: markers=(RELB RWRA)
        MarkerPair: markers=(LELB LWRA)
        BodyScale ulna_r: axes=(X Y Z)
        BodyScale radius_r: axes=(X Y Z)
        BodyScale ulna_l: axes=(X Y Z)
        BodyScale radius_l: axes=(X Y Z)
      Measurement hand: apply=true
        MarkerPair: markers=(RWRA RFIN)
        MarkerPair: markers=(LWRA LFIN)
        BodyScale hand_r: axes=(X Y Z)
        BodyScale hand_l: axes=(X Y Z)
      Measurement femur_r: apply=true
        MarkerPair: markers=(RHJC RKJC)
        BodyScale femur_r: axes=(X Y Z)
        BodyScale femur_distal_r: axes=(X Y Z)
        BodyScale patella_r: axes=(X Y Z)
      Measurement tibia_r: apply=true
        MarkerPair: markers=(RKJC RAJC)
        BodyScale tibia_proximal_r: axes=(X Y Z)
        BodyScale tibia_r: axes=(X Y Z)
      Measurement foot_r: apply=true
        MarkerPair: markers=(RHEE RTOE)
        BodyScale talus_r: axes=(X Y Z)
        BodyScale calcn_r: axes=(X Y Z)
        BodyScale toes_r: axes=(X Y Z)
      Measurement pelvis_xyz: apply=true
        MarkerPair: markers=(RHJC LHJC)
        MarkerPair: markers=(MIDASIS SACR)
        BodyScale pelvis: axes=(X Y Z)
  MarkerPlacer:
    apply: true
    marker_file: C:/LokaleDaten/CloudStation/MyPapers/2020_GuidedGrowth/code/osimProcessing-GitLab/comak/setupFiles/Models/OSS_FHSTP/../../../../../../../../../../Users/bhorsak/Desktop/comakTesting/v1/Static01_marker.trc
    time_range: 0.0066667 1
    max_marker_movement: -1
    IKTaskSet:
      IKMarkerTask RASI: apply=true weight=15
      IKMarkerTask LASI: apply=true weight=15
      IKMarkerTask SACR: apply=true weight=20
      IKMarkerTask RHJC: apply=true weight=25
      IKMarkerTask RT1: apply=true weight=0
      IKMarkerTask RT2: apply=true weight=0
      IKMarkerTask RT3: apply=true weight=0
      IKMarkerTask RKNM: apply=true weight=15
      IKMarkerTask RS1: apply=true weight=0
      IKMarkerTask RS2: apply=true weight=0
      IKMarkerTask RS3: apply=true weight=0
      IKMarkerTask RANK: apply=true weight=15
      IKMarkerTask RANM: apply=true weight=15
      IKMarkerTask RHEE: apply=true weight=15
      IKMarkerTask RTOE: apply=true weight=15
      IKMarkerTask RKJC: apply=true weight=25
      IKMarkerTask RAJC: apply=true weight=25
      IKMarkerTask RKNE: apply=true weight=15
      IKMarkerTask LTOE: apply=true weight=15
      IKMarkerTask LAJC: apply=true weight=25
      IKMarkerTask LHEE: apply=true weight=15
      IKMarkerTask LANK: apply=true weight=15
      IKMarkerTask LANM: apply=true weight=15
      IKMarkerTask LS2: apply=true weight=0
      IKMarkerTask LS3: apply=true weight=0
      IKMarkerTask LS1: apply=true weight=0
      IKMarkerTask LKNM: apply=true weight=15
      IKMarkerTask LKJC: apply=true weight=25
      IKMarkerTask LKNE: apply=true weight=15
      IKMarkerTask LT1: apply=true weight=0
      IKMarkerTask LT2: apply=true weight=0
      IKMarkerTask LT3: apply=true weight=0
      IKMarkerTask LHJC: apply=true weight=25
      IKMarkerTask CLAV: apply=true weight=15
      IKMarkerTask STRN: apply=false weight=1
      IKMarkerTask LSHO: apply=true weight=15
      IKMarkerTask RSHO: apply=true weight=15
      IKMarkerTask LELB: apply=true weight=10
      IKMarkerTask RUPA: apply=true weight=5
      IKMarkerTask RWRA: apply=true weight=5
      IKMarkerTask LWRA: apply=true weight=5
      IKMarkerTask LWRB: apply=true weight=5
      IKMarkerTask RWRB: apply=true weight=5
      IKMarkerTask LFIN: apply=true weight=5
      IKMarkerTask RFIN: apply=true weight=5
      IKMarkerTask T10: apply=true weight=15
      IKMarkerTask RBAK: apply=false weight=1
      IKMarkerTask C7: apply=true weight=15
      IKMarkerTask RFHD: apply=true weight=5
      IKMarkerTask LBHD: apply=true weight=5
      IKMarkerTask LFHD: apply=true weight=5
      IKMarkerTask RBHD: apply=true weight=5
      IKMarkerTask RELB: apply=true weight=10
      IKMarkerTask LUPA: apply=true weight=5
      IKMarkerTask LFRA: apply=true weight=5
      IKMarkerTask RFRA: apply=true weight=5
