# OpenSim document version 40000
MarkerSet:
  Marker RASI: pelvis (0.000599218 0.00444607 0.170731)
  Marker LASI: pelvis (0.000599218 0.00444607 -0.170731)
  Marker SACR: pelvis (-0.1919259 0.04971865 0) fixed=true
  Marker RHJC: femur_r (-0.003097156 0.00917997 -0.0056739) fixed=true
  Marker RT1: femur_r (0.0245009 -0.176222 0.0792525)
  Marker RT2: femur_r (-0.0295388 -0.272816 0.0792525)
  Marker RT3: femur_r (0.0494339 -0.272816 0.0792525)
  Marker RKNM: femur_r (-0.0002768313 -0.370594 -0.0519894)
  Marker RS1: tibia_r (0.0245009 -0.176222 0.0792525)
  Marker RS2: tibia_r (-0.0295388 -0.272816 0.0792525)
  Marker RS3: tibia_r (0.0494339 -0.272816 0.0792525)
  Marker RANK: tibia_r (-0.0238278 -0.401955 0.0491827)
  Marker RANM: tibia_r (-0.00718012 -0.385018 -0.0461455)
  Marker RHEE: calcn_r (-0.0190614 0.0364242 -0.00814648)
  Marker RTOE: calcn_r (0.161664 0.0364242 0.0134313)
  Marker RKJC: femur_r (-0.000395465 -0.370594 0) fixed=true
  Marker RAJC: tibia_r (-0.0105021 -0.385018 0) fixed=true
  Marker RKNE: femur_r (-0.000395465 -0.370594 0.0492517)
  Marker LTOE: calcn_l (0.161664 0.0364242 -0.0134313)
  Marker LAJC: tibia_l (-0.0105021 -0.385018 0) fixed=true
  Marker LHEE: calcn_l (-0.0190614 0.03642421 0.00814648)
  Marker LANK: tibia_l (-0.0238278 -0.4019546 -0.0491827)
  Marker LANM: tibia_l (0.007180115 -0.385018 0.04614551)
  Marker LS2: tibia_l (-0.0295388 -0.272816 -0.0792525)
  Marker LS3: tibia_l (0.0494339 -0.272816 -0.0792525)
  Marker LS1: tibia_l (0.0245009 -0.176222 -0.0792525)
  Marker LKNM: femur_l (0.000276831 -0.370594 0.0519894)
  Marker LKJC: femur_l (-0.000395465 -0.370594 0) fixed=true
  Marker LKNE: femur_l (-0.0003954651 -0.370594 -0.0492517) fixed=true
  Marker LT1: femur_l (0.0245009 -0.176222 -0.0792525)
  Marker LT2: femur_l (-0.0295388 -0.272816 -0.0792525)
  Marker LT3: femur_l (0.0494339 -0.272816 -0.0792525)
  Marker LHJC: femur_l (-0.00309716 0.00917997 0.0056739) fixed=true
  Marker CLAV: torso (0.0313349 0.340419 0)
  Marker STRN: torso (0.09065143 0.2559224 0)
  Marker LSHO: torso (-0.032191 0.380132 -0.148135)
  Marker RSHO: torso (-0.03219101 0.3801317 0.1481346)
  Marker T10: torso (-0.144893 0.215348 0)
  Marker RBAK: torso (-0.144893 0.280393 0.1)
  Marker C7: torso (-0.0784382 0.3678972 0)
  Marker RFHD: neckhead (0.09836305 0.1849112 0.0378075)
  Marker LBHD: neckhead (-0.05623094 0.1925767 -0.06493901)
  Marker LFHD: neckhead (0.098363 0.184911 -0.0378075)
  Marker RBHD: neckhead (-0.0562309 0.192577 0.064939)
  Marker MIDHJC: pelvis (-0.0712942 -0.0740615 0) fixed=true
  Marker MIDASIS: pelvis (0.0006 0.0044 0) fixed=true
