# OpenSim document version 40000
InverseKinematicsTool:
  results_directory: ./
  constraint_weight: Inf
  accuracy: 1e-5
  time_range: -1 -1
  report_errors: true
  report_marker_locations: false
  IKTaskSet:
    IKMarkerTask LASI: apply=true weight=15
    IKMarkerTask RASI: apply=true weight=15
    IKMarkerTask SACR: apply=true weight=20
    IKMarkerTask RKJC: apply=false weight=0
    IKMarkerTask RKNE: apply=true weight=15
    IKMarkerTask RKNM: apply=false weight=0
    IKMarkerTask RT1: apply=true weight=20
    IKMarkerTask RT2: apply=true weight=20
    IKMarkerTask RT3: apply=true weight=20
    IKMarkerTask RAJC: apply=false weight=0
    IKMarkerTask RANK: apply=true weight=20
    IKMarkerTask RANM: apply=false weight=0
    IKMarkerTask RS1: apply=true weight=20
    IKMarkerTask RS2: apply=true weight=20
    IKMarkerTask RS3: apply=true weight=20
    IKMarkerTask RTOE: apply=true weight=20
    IKMarkerTask RHEE: apply=true weight=20
    IKMarkerTask LKJC: apply=false weight=0
    IKMarkerTask LKNE: apply=true weight=15
    IKMarkerTask LKNM: apply=false weight=0
    IKMarkerTask LT1: apply=true weight=20
    IKMarkerTask LT2: apply=true weight=20
    IKMarkerTask LT3: apply=true weight=20
    IKMarkerTask LAJC: apply=false weight=0
    IKMarkerTask LANK: apply=true weight=20
    IKMarkerTask LANM: apply=false weight=0
    IKMarkerTask LS1: apply=true weight=20
    IKMarkerTask LS2: apply=true weight=20
    IKMarkerTask LS3: apply=true weight=20
    IKMarkerTask LTOE: apply=true weight=20
    IKMarkerTask LHEE: apply=true weight=20
    IKMarkerTask LSHO: apply=true weight=20
    IKMarkerTask RSHO: apply=true weight=20
    IKMarkerTask CLAV: apply=true weight=15
    IKMarkerTask STRN: apply=true weight=0
    IKMarkerTask RFHD: apply=true weight=10
    IKMarkerTask LFHD: apply=true weight=10
    IKMarkerTask RBHD: apply=true weight=10
    IKMarkerTask LBHD: apply=true weight=10
    IKMarkerTask C7: apply=true weight=10
