# OpenSim document version 40000
ScaleTool Rajagopal2015_passiveCal_hipAbdMoved-scaled:
  mass: 93.3 [kg]
  height: -1
  age: -1
  GenericModelMaker:
    marker_set_file: FHSTP_pyCGM2_5_noArms_MarkerSet_LaiUhlrich.xml
  ModelScaler:
    apply: true
    scaling_order: measurements
    marker_file: E:\PROGRESS_tests\datasets\data_access_koa_walking\Vicon\OA01\25-06-26\Static01.trc
    time_range: 0.016667 1.0083
    preserve_mass_distribution: true
    MeasurementSet:
      Measurement femur_l: apply=true
        MarkerPair: markers=(LHJC LKJC)
        BodyScale femur_l: axes=(X Y Z)
        BodyScale patella_l: axes=(X Y Z)
      Measurement tibia_l: apply=true
        MarkerPair: markers=(LKJC LAJC)
        BodyScale tibia_l: axes=(X Y Z)
      Measurement foot_l: apply=true
        MarkerPair: markers=(LHEE LVMH)
        MarkerPair: markers=(LHEE LFMH)
        BodyScale talus_l: axes=(X Y Z)
        BodyScale calcn_l: axes=(X Y Z)
        BodyScale toes_l: axes=(X Y Z)
      Measurement femur_r: apply=true
        MarkerPair: markers=(RHJC RKJC)
        BodyScale femur_r: axes=(X Y Z)
        BodyScale patella_r: axes=(X Y Z)
      Measurement tibia_r: apply=true
        MarkerPair: markers=(RKJC RAJC)
        BodyScale tibia_r: axes=(X Y Z)
      Measurement foot_r: apply=true
        MarkerPair: markers=(RHEE RVMH)
        MarkerPair: markers=(RHEE RFMH)
        BodyScale talus_r: axes=(X Y Z)
        BodyScale calcn_r: axes=(X Y Z)
        BodyScale toes_r: axes=(X Y Z)
      Measurement pelvis_xy: apply=true
        MarkerPair: markers=(RASI RPSI)
        MarkerPair: markers=(LASI LPSI)
        BodyScale pelvis: axes=(X Y)
      Measurement torso_z: apply=true
        MarkerPair: markers=(RSHO LSHO)
        BodyScale torso: axes=Z
      Measurement torso_xy: apply=true
        MarkerPair: markers=(RASI T2)
        MarkerPair: markers=(LASI T2)
        MarkerPair: markers=(RASI CLAV)
        MarkerPair: markers=(LASI CLAV)
        MarkerPair: markers=(RPSI T2)
        MarkerPair: markers=(LPSI T2)
        BodyScale torso: axes=(X Y)
      Measurement pelvis_z: apply=true
        MarkerPair: markers=(RHJC LHJC)
        BodyScale pelvis: axes=Z
  MarkerPlacer:
    apply: true
    marker_file: E:\PROGRESS_tests\datasets\data_access_koa_walking\Vicon\OA01\25-06-26\Static01.trc
    time_range: 0.016667 1.0083
    max_marker_movement: -1
    IKTaskSet:
      IKMarkerTask RASI: apply=true weight=25
      IKMarkerTask LASI: apply=true weight=25
      IKMarkerTask LPSI: apply=true weight=25
      IKMarkerTask RHJC: apply=true weight=15
      IKMarkerTask RKNM: apply=true weight=15
      IKMarkerTask RANK: apply=true weight=15
      IKMarkerTask RMED: apply=true weight=15
      IKMarkerTask RHEE: apply=true weight=15
      IKMarkerTask RTOE: apply=true weight=15
      IKMarkerTask RKJC: apply=true weight=20
      IKMarkerTask RAJC: apply=true weight=20
      IKMarkerTask RKNE: apply=true weight=15
      IKMarkerTask LTOE: apply=true weight=15
      IKMarkerTask LAJC: apply=true weight=20
      IKMarkerTask LHEE: apply=true weight=15
      IKMarkerTask LANK: apply=true weight=15
      IKMarkerTask LMED: apply=true weight=15
      IKMarkerTask LKNM: apply=true weight=15
      IKMarkerTask LKJC: apply=true weight=20
      IKMarkerTask LKNE: apply=true weight=15
      IKMarkerTask LHJC: apply=true weight=15
      IKMarkerTask T2: apply=true weight=15
      IKMarkerTask CLAV: apply=true weight=15
      IKMarkerTask LSHO: apply=true weight=1
      IKMarkerTask RSHO: apply=true weight=1
      IKMarkerTask T10: apply=true weight=5
      IKMarkerTask LVMH: apply=true weight=15
      IKMarkerTask LFMH: apply=true weight=15
      IKMarkerTask RFMH: apply=true weight=15
      IKMarkerTask RVMH: apply=true weight=15
      IKMarkerTask RPSI: apply=true weight=25
