# OpenSim document version 40000
InverseKinematicsTool:
  results_directory: ./
  constraint_weight: Inf
  accuracy: 1e-5
  marker_file: E:\UMC_Theia_CP_Testdata\Test_data_Theia_C08\C3D\BF-CWS-06.trc
  time_range: 2.2 3.38
  report_errors: true
  output_motion_file: C:\LokaleDaten\CloudStation\deepForce\WP3-MSKmodeling\MedLat_Knee_Model_Lerner_et_al_v40\..\dataExamples\OSS\_dynamic_IK
  report_marker_locations: false
  IKTaskSet:
    IKMarkerTask RASIS: apply=true weight=30
    IKMarkerTask LASIS: apply=true weight=30
    IKMarkerTask LPSIS: apply=true weight=30
    IKMarkerTask RHJC: apply=false weight=1
    IKMarkerTask RGTRO: apply=true weight=15
    IKMarkerTask RLTHI: apply=true weight=15
    IKMarkerTask RATHI: apply=true weight=15
    IKMarkerTask RFH: apply=true weight=15
    IKMarkerTask RLSHA: apply=true weight=15
    IKMarkerTask RTT: apply=true weight=20
    IKMarkerTask RLM: apply=true weight=25
    IKMarkerTask RMM: apply=false weight=20
    IKMarkerTask RHEE: apply=true weight=25
    IKMarkerTask RMT2: apply=true weight=15
    IKMarkerTask RKJC: apply=false weight=1
    IKMarkerTask RAJC: apply=false weight=1
    IKMarkerTask RLEK: apply=true weight=20
    IKMarkerTask LMT2: apply=true weight=15
    IKMarkerTask LAJC: apply=false weight=1
    IKMarkerTask LHEE: apply=true weight=25
    IKMarkerTask LLM: apply=true weight=25
    IKMarkerTask LMM: apply=false weight=20
    IKMarkerTask LLSHA: apply=true weight=15
    IKMarkerTask LTT: apply=true weight=20
    IKMarkerTask LFH: apply=true weight=15
    IKMarkerTask LKJC: apply=false weight=1
    IKMarkerTask LLEK: apply=true weight=20
    IKMarkerTask LGTRO: apply=true weight=15
    IKMarkerTask LLTHI: apply=true weight=15
    IKMarkerTask LATHI: apply=true weight=15
    IKMarkerTask LHJC: apply=false weight=1
    IKMarkerTask C7: apply=true weight=5
    IKMarkerTask JN: apply=true weight=5
    IKMarkerTask T10: apply=true weight=5
    IKMarkerTask XIPH: apply=true weight=5
    IKMarkerTask RPSIS: apply=true weight=30
    IKMarkerTask RMT1: apply=true weight=15
    IKMarkerTask RMT5: apply=true weight=15
    IKMarkerTask LMT1: apply=true weight=15
    IKMarkerTask LMT5: apply=true weight=15
