# OpenSim document version 40000
MarkerSet:
  Marker RASIS: pelvis (0.0129085 0.00444607 0.123404)
  Marker LASIS: pelvis (0.0129085 0.00444607 -0.1234037)
  Marker LPSIS: pelvis (-0.1543308 0.02560349 -0.04181709)
  Marker RHJC: femur_r (-0.003097156 0.00917997 -0.0056739) fixed=true
  Marker RGTRO: femur_r (-0.0109545 -0.0169295 0.0792525)
  Marker RLTHI: femur_r (0.01519409 -0.1773574 0.07924618)
  Marker RATHI: femur_r (0.08358619 -0.1787108 0.0114744)
  Marker RMEK: femur_r (0.00289382 -0.410809 -0.04523498)
  Marker RFH: tibia_r (-0.02181763 -0.0594436 0.04945434)
  Marker RLSHA: tibia_r (-0.01066918 -0.272816 0.05187325)
  Marker RTT: tibia_r (0.0381245 -0.06473715 0.01442012)
  Marker RLM: tibia_r (-0.01422993 -0.3872082 0.04469485)
  Marker RMM: tibia_r (-0.002159245 -0.3875831 -0.0394654)
  Marker RHEE: calcn_r (-0.0190614 0.0224383 -0.00814648)
  Marker RMT2: calcn_r (0.17388 0.0192894 0.005578887)
  Marker RKJC: femur_r (0 -0.410809 0) fixed=true
  Marker RAJC: tibia_r (0.00127592 -0.3889198 0) fixed=true
  Marker RLEK: femur_r (-0.00277505 -0.406809 0.04490126)
  Marker LMT2: calcn_l (0.17388 0.0192894 -0.00557889)
  Marker LAJC: tibia_l (0.00127592 -0.38892 0) fixed=true
  Marker LHEE: calcn_l (-0.0190614 0.0224383 0.00814648)
  Marker LLM: tibia_l (-0.0142299 -0.387208 -0.0446949)
  Marker LMM: tibia_l (-0.00215925 -0.387583 0.0394654)
  Marker LLSHA: tibia_l (-0.0106692 -0.272816 -0.0518733)
  Marker LTT: tibia_l (0.0381245 -0.0647372 -0.0144201)
  Marker LFH: tibia_l (-0.0218176 -0.0594436 -0.0494543)
  Marker LMEK: femur_l (0.00289382 -0.410809 0.045235)
  Marker LKJC: femur_l (0 -0.410809 0) fixed=true
  Marker LLEK: femur_l (-0.00277505 -0.406809 -0.0449013)
  Marker LGTRO: femur_l (-0.01095451 -0.0169295 -0.0792525)
  Marker LLTHI: femur_l (0.0151941 -0.177357 -0.0792462)
  Marker LATHI: femur_l (0.0835862 -0.178711 -0.0114744)
  Marker LHJC: femur_l (-0.00309716 0.00917997 -0.0056739) fixed=true
  Marker C7: torso (-0.0784382 0.4213812 0)
  Marker JN: torso (0.0431244 0.3750907 0)
  Marker T10: torso (-0.09714077 0.215348 0)
  Marker XIPH: torso (0.0906514 0.255922 0)
  Marker RPSIS: pelvis (-0.154331 0.0256035 0.0418171)
  Marker RMT1: calcn_r (0.1734273 0.01003193 -0.04529126)
  Marker RMT5: calcn_r (0.1475903 0.01554948 0.04980082)
  Marker LMT1: calcn_l (0.173427 0.0100319 0.0452913)
  Marker LMT5: calcn_l (0.14759 0.0155495 -0.0498008)
