# OpenSim document version 40000
ScaleTool Rajagopal2015_passiveCal_hipAbdMoved-scaled:
  mass: 93.3 [kg]
  height: -1
  age: -1
  GenericModelMaker:
    marker_set_file: UMCnoArms_HBM_MarkerSet_LaiUhlrich.xml
  ModelScaler:
    apply: true
    scaling_order: measurements
    marker_file: E:\UMC_Theia_CP_Testdata\Test_data_Theia_C08\C3D\ROM-01.trc
    time_range: 0.02 2.19
    preserve_mass_distribution: true
    MeasurementSet:
      Measurement pelvis_x: apply=false
        MarkerPair: markers=(RASIS RPSIS)
        MarkerPair: markers=(LASIS LPSIS)
      Measurement pelvis_y: apply=false
        MarkerPair: markers=(RHJC RASIS)
        MarkerPair: markers=(LHJC LASIS)
        MarkerPair: markers=(RHJC RPSIS)
        MarkerPair: markers=(LHJC LPSIS)
      Measurement pelvis_z: apply=false
        MarkerPair: markers=(RHJC LHJC)
      Measurement femur_l: apply=true
        MarkerPair: markers=(LHJC LKJC)
        BodyScale femur_l: axes=(X Y Z)
        BodyScale patella_l: axes=(X Y Z)
      Measurement tibia_l: apply=true
        MarkerPair: markers=(LKJC LAJC)
        BodyScale tibia_l: axes=(X Y Z)
      Measurement foot_l: apply=true
        MarkerPair: markers=(LHEE LMT2)
        BodyScale talus_l: axes=(X Y Z)
        BodyScale calcn_l: axes=(X Y Z)
        BodyScale toes_l: axes=(X Y Z)
      Measurement femur_r: apply=true
        MarkerPair: markers=(RHJC RKJC)
        BodyScale femur_r: axes=(X Y Z)
        BodyScale patella_r: axes=(X Y Z)
      Measurement tibia_r: apply=true
        MarkerPair: markers=(RKJC RAJC)
        BodyScale tibia_r: axes=(X Y Z)
      Measurement foot_r: apply=true
        MarkerPair: markers=(RHEE RMT2)
        BodyScale talus_r: axes=(X Y Z)
        BodyScale calcn_r: axes=(X Y Z)
        BodyScale toes_r: axes=(X Y Z)
      Measurement pelvis_xyz: apply=true
        MarkerPair: markers=(RHJC LHJC)
        BodyScale pelvis: axes=(X Y Z)
      Measurement torso_xyz: apply=true
        MarkerPair: markers=(RPSIS C7)
        MarkerPair: markers=(LPSIS C7)
        MarkerPair: markers=(XIPH T10)
        BodyScale torso: axes=(X Y Z)
  MarkerPlacer:
    apply: true
    marker_file: E:\UMC_Theia_CP_Testdata\Test_data_Theia_C08\C3D\ROM-01.trc
    time_range: 0.02 0.06
    max_marker_movement: -1
    IKTaskSet:
      IKMarkerTask RASIS: apply=true weight=30
      IKMarkerTask LASIS: apply=true weight=30
      IKMarkerTask LPSIS: apply=true weight=30
      IKMarkerTask RHJC: apply=true weight=15
      IKMarkerTask RGTRO: apply=true weight=10
      IKMarkerTask RLTHI: apply=true weight=0
      IKMarkerTask RATHI: apply=true weight=0
      IKMarkerTask RMEK: apply=true weight=20
      IKMarkerTask RFH: apply=true weight=15
      IKMarkerTask RLSHA: apply=true weight=0
      IKMarkerTask RTT: apply=true weight=15
      IKMarkerTask RLM: apply=true weight=20
      IKMarkerTask RMM: apply=true weight=20
      IKMarkerTask RHEE: apply=true weight=20
      IKMarkerTask RMT2: apply=true weight=20
      IKMarkerTask RKJC: apply=true weight=15
      IKMarkerTask RAJC: apply=true weight=15
      IKMarkerTask RLEK: apply=true weight=20
      IKMarkerTask LMT2: apply=true weight=20
      IKMarkerTask LAJC: apply=true weight=15
      IKMarkerTask LHEE: apply=true weight=20
      IKMarkerTask LLM: apply=true weight=20
      IKMarkerTask LMM: apply=true weight=20
      IKMarkerTask LLSHA: apply=true weight=0
      IKMarkerTask LTT: apply=true weight=15
      IKMarkerTask LFH: apply=true weight=15
      IKMarkerTask LMEK: apply=true weight=20
      IKMarkerTask LKJC: apply=true weight=15
      IKMarkerTask LLEK: apply=true weight=20
      IKMarkerTask LGTRO: apply=true weight=10
      IKMarkerTask LLTHI: apply=true weight=0
      IKMarkerTask LATHI: apply=true weight=0
      IKMarkerTask LHJC: apply=true weight=15
      IKMarkerTask C7: apply=true weight=5
      IKMarkerTask JN: apply=true weight=5
      IKMarkerTask T10: apply=true weight=5
      IKMarkerTask XIPH: apply=true weight=5
      IKMarkerTask RPSIS: apply=true weight=30
      IKMarkerTask RMT1: apply=true weight=20
      IKMarkerTask RMT5: apply=true weight=20
      IKMarkerTask LMT1: apply=true weight=20
      IKMarkerTask LMT5: apply=true weight=20
